f(x) := x*2^x - 1
xxx := [1.17; 1.34; 1.74]
M := [1, f(1); 1.2, f(1.2); 1.4, f(1.4); 1.6, f(1.6); 1.8, f(1.8); 2, f(2)] = [1, 1; 1.2, 1.75688; 1.4, 2.69462; 1.6, 3.85029; 1.8, 5.26796; 2, 7]
N := [1.632719; 2.392102; 4.812037]
L := [1.63272; 2.392102; 4.812037]
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