f(x) := x*2^x - 1
x0 := 1
xn := 2
h := 0.2
X := [1; 1.2; 1.4; 1.6; 1.8; 2]
Y := [f(X[0]); f(X[1]); f(X[2]); f(X[3]); f(X[4]); f(X[5])] = [1; 1.75688; 2.69462; 3.85029; 5.26796; 7]
C := [0; 0; 0; 0; 0; 0]
A := Y
Given
i := 1
C[i - 1]*0.2 + 0.8*C[i] + C[i + 1]*0.2 == 30*(Y[i + 1] - 2*Y[i] + Y[i - 1])
C := Find(C) = [0; 6.78263; 0; 0; 0; 0]
i := 2
Given
C[i - 1]*0.2 + 0.8*C[i] + C[i + 1]*0.2 == 30*(Y[i + 1] - 2*Y[i] + Y[i - 1])
C := Find(C) = [0; 6.78263; 6.47652; 0; 0; 0]
i := 3
Given
C[i - 1]*0.2 + 0.8*C[i] + C[i + 1]*0.2 == 30*(Y[i + 1] - 2*Y[i] + Y[i - 1])
C := Find(C) = [0; 6.78263; 6.47652; 8.20588; 0; 0]
i := 4
Given
C[i - 1]*0.2 + 0.8*C[i] + C[i + 1]*0.2 == 30*(Y[i + 1] - 2*Y[i] + Y[i - 1])
C := Find(C) = [0; 6.78263; 6.47652; 8.20588; 9.73721; 0]
C = [0; 6.78263; 6.47652; 8.20588; 9.73721; 0]
fD(i) := (C[i] - C[i - 1])/0.2
D := [0; fD(1); fD(2); fD(3); fD(4); fD(5)] = [0; 33.9131; -1.53052; 8.64677; 7.65669; -48.6861]
fB(i) := C[i]*0.2/2 - D[i]*0.04/6 + (Y[i] - Y[i - 1])/0.2
B := [0; fB(1); fB(2); fB(3); fB(4); fB(5)] = [0; 4.23656; 5.34659; 6.5413; 8.01103; 8.98475]
P(x, i) := A[i] + B[i]*(x - X[i]) + C[i]*(x - X[i])^2/2 + D[i]*(x - X[i])^3/6
Splain(x) :=
    return P(x, 1) if x ≥ 1 and x ≤ 1.2
    return P(x, 2) if x ≥ 1.2 and x ≤ 1.4
    return P(x, 3) if x ≥ 1.4 and x ≤ 1.6
    return P(x, 4) if x ≥ 1.6 and x ≤ 1.8
    return P(x, 5) if x ≥ 1.8 and x ≤ 2
Points := [1.1; 1.55; 1.9]
result := [Splain(Points[0]); Splain(Points[1]); Splain(Points[2])] = [1.36148; 3.53331; 6.10964]
absPogr(x) := |Splain(x) - f(x)|
otnPogr(x) := absPogr(x)*100*%/f(x)
masAbsPogr := [absPogr(Points[0]); absPogr(Points[1]); absPogr(Points[2])] = [0.00357984; 0.00536028; 0.0185883]
masOtnPogr := [otnPogr(Points[0]); otnPogr(Points[1]); otnPogr(Points[2])] = [0.0026363; 0.00151477; 0.00305173]
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