sum1(xxx, step_x, yyy, step_y) := sum(xxx[i]^step_x*yyy[i]^step_y, i = 0 .. 5)
xx := [0; 2; 4; 6; 8; 10]
y := [5; -1; 0.5; 1.5; 4.5; 8.5]
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n := 6
a := 0
b := 0
c := 0
Given
a*sum1(xx, 4, y, 0) + b*sum1(xx, 3, y, 0) + c*sum1(xx, 2, y, 0) == sum1(xx, 2, y, 1)
a*sum1(xx, 3, y, 0) + b*sum1(xx, 2, y, 0) + c*sum1(xx, 1, y, 0) == sum1(xx, 1, y, 1)
a*sum1(xx, 2, y, 0) + b*sum1(xx, 1, y, 0) + c*6 == sum1(xx, 0, y, 1)
asd := Find(a, b, c) = [0.25; -2; 4]
f2(x) := asd[0]*x^2 + asd[1]*x + asd[2]
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# f3
d := 0
Given
a*sum1(xx, 6, y, 0) + b*sum1(xx, 5, y, 0) + c*sum1(xx, 4, y, 0) + d*sum1(xx, 3, y, 0) == sum1(xx, 3, y, 1)
a*sum1(xx, 5, y, 0) + b*sum1(xx, 4, y, 0) + c*sum1(xx, 3, y, 0) + d*sum1(xx, 2, y, 0) == sum1(xx, 2, y, 1)
a*sum1(xx, 4, y, 0) + b*sum1(xx, 3, y, 0) + c*sum1(xx, 2, y, 0) + d*sum1(xx, 1, y, 0) == sum1(xx, 1, y, 1)
a*sum1(xx, 3, y, 0) + b*sum1(xx, 2, y, 0) + c*sum1(xx, 1, y, 0) + d*6 == sum1(xx, 0, y, 1)
asd1 := Find(a, b, c, d) = [-0.0289352; 0.684028; -3.58565; 4.69444]
f3(x) := asd1[0]*x*x*x + asd1[1]*x*x + asd1[2]*x + asd1[3]
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tablF2 := [f2(xx[0]); f2(xx[1]); f2(xx[2]); f2(xx[3]); f2(xx[4]); f2(xx[5])] = [4; 1; 0; 1; 4; 9]
tablF3 := [f3(xx[0]); f3(xx[1]); f3(xx[2]); f3(xx[3]); f3(xx[4]); f3(xx[5])] = [4.69444; 0.0277778; -0.555556; 1.55556; 4.97222; 8.30556]
Q3 := sum((y[i] - tablF3[i])^2, i = 0 .. 5) = 2.52778
Q2 := sum((y[i] - tablF2[i])^2, i = 0 .. 5) = 6
# f3 - наилучшее приближение
