integral(x/(2*x + 1), x = 0.2 .. 1) = 0.209465
f(x) := x/(2*x + 1)
F(x) := x/2 - 1/4*ln(|2*x + 1|)
a := 0.2
b := 1
n := 10
h := (b - a)/n = 0.08
# Метод прямоугольников
Table1(f, h, n) :=
    for i ∈ 0 .. n
        T[0, i] ← a + i*h
        T[1, i] ← f(T[0, i])
        T[2, i] ← f(T[0, i] - h/2)
    return T
M1 := Table1(f, h, n) = [
    0.2, 0.28, 0.36, 0.44, 0.52, 0.6, 0.68, 0.76, 0.84, 0.92, 1;
    0.142857, 0.179487, 0.209302, 0.234043, 0.254902, 0.272727, 0.288136, 0.301587, 0.313433, 0.323944, 0.333333;
    0.121212, 0.162162, 0.195122, 0.222222, 0.244898, 0.264151, 0.280702, 0.295082, 0.307692, 0.318841, 0.328767
]
L := h*sum(M1[1, i], i = 0 .. n - 1) = 0.201633
R := h*sum(M1[1, i], i = 1 .. n) = 0.216872
M := h*sum(M1[2, i], i = 1 .. n) = 0.209571
# Формула трапеции
F_Tr := (M1[1, n] + M1[1, 0] + 2*sum(M1[1, i], i = 1 .. n - 1))*(b - a)/(2*n) = 0.209252
# Формула Симпсона
F_Simpsona := h/6*sum(M1[1, i - 1] + 4*M1[2, i] + M1[1, i], i = 1 .. n) = 0.209465
I := F(b) - F(a) = 0.209465
dx(a, b) := |a - b|
DX(dx, a) := dx*100/|a|
# Погрешность метода прямоуголька
dL := dx(I, L) = 0.00783156
DX(dL, I) = 3.73884
dR := dx(I, R) = 0.00740653
DX(dR, I) = 3.53593
dM := dx(I, M) = 0.000106131
DX(dM, I) = 0.0506675
# Погрешность формулы трапеции
p_TR := dx(I, F_Tr) = 0.000212513
DX(p_TR, I) = 0.101455
# Погрешность для метода Симпсона
p_Simpsona := dx(I, F_Simpsona) = 8.39639e-8
DX(p_Simpsona, I) = 4.00849e-5
# Задание 3
# Метод прямоугольников
e := 0.001
pr_21(x) := d^2/dx^2(x/(2*x + 1))
pr_2(x) := 1/(4*x^2 + 4*x + 1)
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M := |pr_2(0.2)| = 0.510204  # max
z := 1
M3 := Table1(f, (b - a)/5, 5) = [
    0.2, 0.36, 0.52, 0.68, 0.84, 1;
    0.142857, 0.209302, 0.254902, 0.288136, 0.313433, 0.333333;
    0.0967742, 0.179487, 0.234043, 0.272727, 0.301587, 0.323944
]
Given
(b - a)^3*M/(24*z^2) ≤ 10^-3*1/2
(M3[1, 5] + M3[1, 0] + 2*sum(M3[1, i], i = 1 .. 5 - 1))*(b - a)/(2*5) = 0.208619
z := Find(z) = 4.66569  # ~5
# Метод трапеций
z := 1
M2 := Table1(f, (b - a)/7, 7) = [
    0.2, 0.314286, 0.428571, 0.542857, 0.657143, 0.771429, 0.885714, 1;
    0.142857, 0.192982, 0.230769, 0.260274, 0.283951, 0.303371, 0.319588, 0.333333;
    0.111111, 0.169811, 0.213115, 0.246377, 0.272727, 0.294118, 0.311828, 0.326733
]
Given
(M2[1, 7] + M2[1, 0] + 2*sum(M2[1, i], i = 1 .. 7 - 1))*(b - a)/(2*7) = 0.209032
(b - a)^3*M/(12*z^2) ≤ 10^-3*1/2
z := Find(z) = 6.59829  # ~7
# Метод Симпсона
pr_4(x) := -192*(2*x + 1)^-5
pr_4(x) := d^4/dx^4(1/(2*x + 1))
pr_4(x) := 2*((4*x^2 + 4*x) + 1)^-1
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M := |pr_4(0.2)| = 1.02041
M4 := Table1(f, (b - a)/4, 4) = [
    0.2, 0.4, 0.6, 0.8, 1;
    0.142857, 0.222222, 0.272727, 0.307692, 0.333333;
    0.0833333, 0.1875, 0.25, 0.291667, 0.321429
]
z := 1
Given
(b - a)^3*M/(12*z^4) ≤ 10^-3*1/2
(b - a)/4/6*sum(M4[1, i - 1] + 4*M4[2, i] + M4[1, i], i = 1 .. 4) = 0.209462
z := Find(z) = 3.05473  # ~3
# Метод Гаусса
t(x) := (b - a)/2*x + (b + a)/2
XGauss := [-0.93246951; -0.6612093; -0.23861918; 0.23861918; 0.6612093; 0.93246951]
CGauss := [0.171324492; 0.36076157; 0.46793; 0.46793; 0.36076157; 0.171324492]
N := 6
GAUSS := sum(CGauss[i]*F(t(XGauss[i])), i = 0 .. N - 1) = 0.217261
dG := dx(GAUSS, I) = 0.00779593
